** Generated by: Abaqus/CAE 6.11-1
** Generated by: Abaqus/CAE 6.10-EF1
**
*Heading
** Job name: check Model name: Sprengmuster-flux1_0-surfblast
*Preprint, echo=NO, model=NO, history=NO, contact=NO
*Part, name=Euler
*Node
      1,           0.,        1000.,        1000.
      2,           0.,         975.,        1000.
      3,           0.,         950.,        1000.
      4,           0.,         925.,        1000.
      5,           0.,         900.,        1000.
*Element, type=EC3D8R
    1,  1682,  1683,  1724,  1723,     1,     2,    43,    42
    2,  1683,  1684,  1725,  1724,     2,     3,    44,    43
    3,  1684,  1685,  1726,  1725,     3,     4,    45,    44
    4,  1685,  1686,  1727,  1726,     4,     5,    46,    45
    5,  1686,  1687,  1728,  1727,     5,     6,    47,    46
*Nset, nset=_PickedSet5, internal, generate
     1,  68921,      1
*Elset, elset=_PickedSet5, internal, generate
     1,  64000,      1
*Nset, nset=Set-1_vx, generate
    1,  1681,     1
*Nset, nset=Set-3_Vz
     1,     2,     3,     4,     5,     6
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*Nset, nset=Set-2_Vz, generate
    41,  68921,     41
** Section: Section-3-euler
*Eulerian Section, elset=_PickedSet5,flux limit ratio=1.0
Air, air-1
TNT, tnt-1
*Surface, type=EULERIAN MATERIAL, name=air-1
air-1
*Surface, type=EULERIAN MATERIAL, name=tnt-1
tnt-1
*End Part
**
*Part, name=Platte-solid
*Node
      1,        552.5,       751.25,           0.
      2,        552.5,       551.25,           0.
      3,          2.5,       551.25,           0.
      4,          2.5,       751.25,           0.
      5,        552.5,       551.25,          25.
*Element, type=SC8R
 1,  52, 223,  19,   1,  57, 275,  56,   6
 2, 223, 224,  20,  19, 275, 276,  55,  56
 3, 224, 225,  21,  20, 276, 277,  54,  55
 4, 225, 226,  22,  21, 277, 278,  53,  54
 5, 226,  23,   2,  22, 278,  86,   5,  53
*Nset, nset=_PickedSet3, internal, generate
   1,  800,    1
*Elset, elset=_PickedSet3, internal, generate
   1,  361,    1
*Nset, nset=node-bc
   1,   2,   3,   4,   5,   6
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*Elset, elset=node-bc
   1,   2,   3,   4,   5,   6
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*Nset, nset=ysymm-bc
   3,   4,   7,   8,  10,  12
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*Elset, elset=ysymm-bc
  66,  67,  68,  69,  70, 253
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*Nset, nset=xsymm-bc
   9,  10,  11,  12,  14,  15
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*Elset, elset=xsymm-bc
  84,  98, 112, 126, 140, 154
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** Section: Section-1-PSHELL_PID_1
*Shell Section, elset=_PickedSet3, material=mat1
25., 5
*End Part
**
**
** ASSEMBLY
**
*Assembly, name=Assembly
**
*Instance, name=Euler-1, part=Euler
        -0.1,          0.1,        -340.
*End Instance
**
*Instance, name=Platte-solid-1, part=Platte-solid
        1.25,         -2.5,        387.5
        1.25,         -2.5,        387.5,         1.25,         -2.5,        388.5,          90.
*End Instance
**
*Node
      1,           0.,           0.,           0.
*Nset, nset=_PickedSet16, internal
 1,
*Nset, nset=_PickedSet20, internal
 1,
*Nset, nset=_PickedSet25, internal, instance=Euler-1, generate
     1,  68921,      1
*Elset, elset=_PickedSet25, internal, instance=Euler-1, generate
     1,  64000,      1
*Nset, nset=_PickedSet32, internal, instance=Euler-1, generate
     1,  68921,      1
*Elset, elset=_PickedSet32, internal, instance=Euler-1, generate
     1,  64000,      1
*Nset, nset=_PickedSet33, internal, instance=Euler-1, generate
     1,  68921,      1
*Elset, elset=_PickedSet33, internal, instance=Euler-1, generate
     1,  64000,      1
*Nset, nset=_PickedSet34, internal, instance=Euler-1, generate
     1,  68921,      1
*Elset, elset=_PickedSet34, internal, instance=Euler-1, generate
     1,  64000,      1
*Nset, nset=_PickedSet40, internal, instance=Euler-1, generate
     1,  68921,      1
*Elset, elset=_PickedSet40, internal, instance=Euler-1, generate
     1,  64000,      1
*Nset, nset=_PickedSet41, internal, instance=Euler-1, generate
    1,  1681,     1
*Elset, elset=_PickedSet41, internal, instance=Euler-1, generate
    1,  1600,     1
*Nset, nset=_PickedSet42, internal, instance=Euler-1, generate
    41,  68921,     41
*Elset, elset=_PickedSet42, internal, instance=Euler-1, generate
    40,  64000,     40
*Nset, nset=_PickedSet48, internal, instance=Euler-1, generate
     1,  68921,      1
*Elset, elset=_PickedSet48, internal, instance=Euler-1, generate
     1,  64000,      1
*Nset, nset=top-plate, instance=Platte-solid-1
 12,
*Nset, nset=_PickedSet67, internal, instance=Euler-1
  1641,  1642,  1643,  1644,  1645,  1646
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*Elset, elset=_PickedSet67, internal, instance=Euler-1
  1561,  1562,  1563,  1564,  1565,  1566
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*Nset, nset=_PickedSet69, internal, instance=Euler-1, generate
     1,  68921,      1
*Elset, elset=_PickedSet69, internal, instance=Euler-1, generate
     1,  64000,      1
*Nset, nset=air_eul, instance=Euler-1
     1,     2,     3,     4,     5,     6
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*Elset, elset=__PickedSurf49_S3, internal, instance=Euler-1
     1,     2,     3,     4,     5,     6
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*Surface, type=ELEMENT, name=_PickedSurf49, internal
__PickedSurf49_S3, S3
*Elset, elset=_Surf-2-platte-solid_S1, internal, instance=Platte-solid-1, generate
   1,  361,    1
*Elset, elset=_Surf-2-platte-solid_S4, internal, instance=Platte-solid-1
  84,  98, 112, 126, 140, 154
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*Elset, elset=_Surf-2-platte-solid_S2, internal, instance=Platte-solid-1, generate
   1,  361,    1
*Elset, elset=_Surf-2-platte-solid_S6, internal, instance=Platte-solid-1
   1,   6,  11,  16,  21,  26
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*Elset, elset=_Surf-2-platte-solid_S3, internal, instance=Platte-solid-1
  66,  67,  68,  69,  70, 253
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*Surface, type=ELEMENT, name=Surf-2-platte-solid
_Surf-2-platte-solid_S1, S1
*Surface, type=ELEMENT, name=Surf-2-platte-solid_S4
_Surf-2-platte-solid_S4, S4
*Surface, type=ELEMENT, name=Surf-2-platte-solid_S2
_Surf-2-platte-solid_S2, S2
*Surface, type=ELEMENT, name=Surf-2-platte-solid_S6
_Surf-2-platte-solid_S6, S6
*Surface, type=ELEMENT, name=Surf-2-platte-solid_S3
_Surf-2-platte-solid_S3, S3
*End Assembly
**
** MATERIALS
**
*Material, name=Air
*Density
 1.29e-12,
*Eos, type=IDEALGAS
 2.87e+08, 0.1
*Specific Heat
 1.0035e+09,
*Material, name=TNT
*Density
 1.63e-09,
*Eos, type=JWL
 6.93e+06,  370000.,    3130.,      0.3,     4.15,     0.95, 4.29e+12,       0.
*Detonation Point
0.,  0.,-45.,  0.
**  material data from MAT1 with MID = 1
**
*Material, name=mat1
*Damage Initiation, criterion=JOHNSON COOK
0.,    0.5,   0.55, -0.007,     0.,  1500.,   900., 0.0008
*Damage Evolution, type=DISPLACEMENT
0.,
*Density
 7.85e-09,
*Elastic
210000., 0.33
*Plastic, hardening=JOHNSON COOK
600.,1402., 0.09,  1.2,1500., 900.
*Rate Dependent, type=JOHNSON COOK
 0.007, 0.0008
**
** INTERACTION PROPERTIES
**
*Surface Interaction, name=IntProp-1
*Surface Interaction, name=IntProp-2
**
** PHYSICAL CONSTANTS
**
*Physical Constants, absolute zero=-273.15
**
** PREDEFINED FIELDS
**
** Name: Predefined Field-2   Type: Temperature
*Initial Conditions, type=TEMPERATURE
air_eul, 20.
** Name: Predefined Field-3   Type: Material assignment
*Initial Conditions, type=VOLUME FRACTION
Euler-1.1, Euler-1.air-1, 1.
Euler-1.2, Euler-1.air-1, 1.
Euler-1.3, Euler-1.air-1, 1.
Euler-1.4, Euler-1.air-1, 1.
Euler-1.5, Euler-1.air-1, 1.
**
** INTERACTIONS
**
** Interaction: Int-1
*Contact, op=NEW
*Contact Inclusions
Surf-2-platte-solid,Euler-1.tnt-1
*Contact Property Assignment
 ,  , IntProp-1
*contact formulation, type=polarity
,Surf-2-platte-solid,SPOS
** ----------------------------------------------------------------
**
** STEP: Step-1
**
*Step, name=Step-1
*Dynamic, Explicit, element by element
, 8e-4
*Bulk Viscosity
0.06, 1.2
**
** BOUNDARY CONDITIONS
**
** Name: BC-1 Type: Displacement/Rotation
*Boundary
Platte-solid-1.node-bc, 1, 1
Platte-solid-1.node-bc, 2, 2
Platte-solid-1.node-bc, 3, 3
** Name: BC-2-xsymm Type: Symmetry/Antisymmetry/Encastre
*Boundary
Platte-solid-1.xsymm-bc, XSYMM
** Name: BC-2-ysymm Type: Symmetry/Antisymmetry/Encastre
*Boundary
Platte-solid-1.ysymm-bc, YSYMM
** Name: BC-4-euler-X-symm Type: Velocity/Angular velocity
*Boundary, type=VELOCITY
_PickedSet41, 1, 1
** Name: BC-5-EULER-Y-Symm Type: Velocity/Angular velocity
*Boundary, type=VELOCITY
_PickedSet42, 2, 2
** Name: BC-6-euler-z-symm Type: Velocity/Angular velocity
*Boundary, type=VELOCITY
_PickedSet67, 3, 3
**
** OUTPUT REQUESTS
**
*Restart, write, number interval=1, time marks=NO
**
** FIELD OUTPUT: F-Output-1
**
*Output, field, time interval=1e-05
*Node Output
AT, RF, UT, VT
*Element Output, directions=YES
DENSITYVAVG, DMICRT, EDT, EVF, LE, PE, PEEQ, PEEQVAVG, PEVAVG, S, SDEG, STATUS, SVAVG, TEMP
*Contact Output
CSTRESS,
**
** HISTORY OUTPUT: H-Output-1
**
*Output, history
*Energy Output
ALLAE, ALLCD, ALLDMD, ALLFD, ALLIE, ALLKE, ALLPD, ALLSE, ALLVD, ALLWK, ETOTAL
*Incrementation Output
DT,
**
** HISTORY OUTPUT: H-Output-2
**
*Node Output, nset=top-plate
U1, U2, U3
*End Step
